# DC DESIGNFORLØB
# Effektforsyningen
# Effektforsyningen planlægges med start ved udgangen. Ved en effekt på 30W i 8Ω skal udgangsspændingen være
# VO RMS = 15,5V med amplituden VO = 22V. Der skal være plads til to basis-emitter strækninger for udgangstrinnet, noget lignende til den øvrige elektronik og ripple i effektforsyningen og 10% på netspændingen så effektforsyningen bør placeres cirka 5V højere end kravet til VO og det giver værdien til +-27V.
P_O := 30 W
R_L := 8 Ω
P_O == V_rms^2/R_L
V_rms := sqrt(P_O*R_L) = 15.4919 V
V_O := V_rms*sqrt(2) = 21.9089 V
V_CC := 1.1*22 V + 2*0.7 V + 2*0.7 V = 27 V
V_EE := -V_CC = -27 V
# Strømniveauet
# Strømniveauet i udgangstrinnet estimeres. Med 8Ω som den nominelle belastning bør der tages udgangspunkt i
# RL = 6Ω da en højttaler har en svingspole der har en DC modstand RDC på typisk 80% af den nominelle værdi.
#
# Strømmens spidsværdi bliver IO PEAK = 3,65A og der må forventes en middelstrøm fra effektforsyningen på
# IDC = 1,16A. Hvis den værdi holder så bliver den tilførte effekt på 67W ved 30W afgivet i nominelt 8Ω og virkningsgraden er 45%.
R_L := 6 Ω
I_OPEAK := V_O/R_L = 3.65148 A
I_DC := I_OPEAK/π = 1.1623 A  # IDC half wave
P_CC := V_CC*(I_OPEAK - I_DC) = 67.2079 W
η := P_O/P_CC*100 = 44.6376
# Effekttabet
# Effekttabet i udgangstransistorerne T10 og T11 bliver 24W samlet og derfor forventes et tab på 12W i hver transistor. Det danner udgangspunktet for en senere beregning af køleprofilen.
P_T := (2/π)*V_CC*V_O/R_L - V_O^2/(2*R_L) = 22.7644 W
P_T := 0.4*V_CC^2/(2*R_L) = 24.3 W
# Drivertrinnet
# Drivertrinnet skal levere basisstrømmen til udgangstransistorerne 2N3055 og MJ2955 og med β10 = β11 = 20 som strømforstærkning i T10 og T11 behøves en strøm på 183mA så der afsættes 1/20 af effekttabet i drivertransistorerne T8 og T9 eller 0,6W i hver transistor.
#
# Man bør være meget konservativ og dimensionere efter en transistor der kan håndtere mindst 1W da effekten varierer som funktion af udgangsspændingen. Der bruges en transistor på 10W uden et køleprofil og ellers må man planlægge køling af disse transistorer.
β_10 := 20
I_B := I_OPEAK/β_10 = 182.574 mA
P_TO := P_T/20 = 1.215 W
P_T9 := P_TO/2 = 0.6075 W
# Basisstrømmen
# Basisstrømmen til drivertrinnet er 5 mA ved en strømforstærkning på β8 = β9= 40.
β_8 := 40
I_B := 183 mA/β_8 = 4.575 mA
# Modstanden RE i strømkilden
I_C == U_BE/R_E solve, R_E → U_BE/I_C
R_E := 0.7 V/(4.58 mA) = 152.838 Ω
# Indgangstrinnet
# Indgangstrinnet skal levere basisstrømmen til T5 som med β5 = 420 er på 25 μA. Der bør vælges en mange gange højere strøm i den fælles emitter for at holde differentialtrinnets balance nær ved fifty-fifty så strømmen vælges til
# IE = 5 mA. Det indstilles ved modstanden RE til 5,1kΩ.
I_E := 5 mA
R_E := (27 V - 0.7 V)/I_E = 5.26 kΩ
R_E := 5.1 kΩ
# Forstærkningen
# Forstærkningen indstilles så fuld udstyring på VO RMS = 15,5 V opnås ved ved VI RMS = 0,5 V på indgangen og indstilles af ACL = 1 + R6/R5 = 31. Et valg af R3 = 1 kΩ giver R4 = 30 kΩ.
A_CL := 15.5/0.5 = 31
R_3 := 1 kΩ
A_CL == 1 + R_4/R_3 solve, R_4 → 30*kΩ
# AC DESIGNFORLØB
# Den lave grænsefrekvens
# Den lave grænsefrekvens fastsættes af C1 og R2 til 1,6Hz og kondensator C4 skal blot være ”stor” så spændingsvariationen over den bliver ”lille” i sammenligning med værdien over R5 for at holde forvrængningen nede. Det skyldes at en aluminium elektrolyt kondensator ikke er en lineær komponent.
# En typisk værdi på 100 μF giver 1,6 Hz.
C_1 := 10 μF
C_4 := 100 μF
R_2 := 10 kΩ
R_3 := 1 kΩ
f_1 := 1/(2*π*R_2*C_1) = 1.59155 Hz
f_2 := 1/(2*π*R_3*C_4) = 1.59155 Hz
# Transkonduktansen
# Transkonduktansen gm i differentialtrinnet T1 ... T4 beregnes til 96mS.
I_E := 5 mA
U_T := 26 mV
g_m := I_E/(2*U_T) = 0.0961538 S
# Åben-sløjfe forstærkningen
# Åben-sløjfe forstærkningen beregnes fra transkonduktansen, strømforstærkningen i T5 og indgangsmodstanden på udgangstrinnet ved basis af T8 og T9 der giver et estimat på RC i formlen.
#
# Indgangsmodstanden for en emitterfølger er belastningen RL gange med den samlede strømforstærkning til
# RC = 4,8 kΩ. DC forstærkningen beregnes derefter til ADC = 194 000 ved en belastning på RL = 6 Ω.
β_8 := 40
β_10 := 20
R_C := β_8*β_10*6 Ω = 4.8 kΩ
β_5 := 420
A_DC := g_m*β_5*R_C = 193846
# Kompenseringen
# Kompenseringen skal sikre stabilitet ved at reducere forstærkningen til en ved den laveste af de høje poler der antages givet af RC og Cμ for T5, T8 og T9 i parallel.
#
# Ved en værdi på 10 pF findes fH = 3,3 MHz og den dominerende pol f0 findes til 17 Hz. Ved den aktuelle forstærkning på ACL = 31 kan den dominerende pol fP findes til 530 Hz som er tilstrækkelig for stabilitet.
#
# Herefter beregnes C6 til 150 pF.
C_μ := 10*pF
f_H := 1/(2*π*R_C*C_μ) = 3.31573 MHz
f_0 := f_H/A_DC = 17.1049 Hz
f_P := A_CL*f_0 = 530.253 Hz
f_H*A_CL/(4*A_DC) = 132.563 Hz
f_0 ≤ f_H*A_CL/(4*A_DC)
f_0 ≤ 132 Hz
C_C := 1/(2*π*f_P*β_5*R_C) = 148.883 pF
# Slew rate
# Slew rate værdien bliver SR = 27 V/μs der fuldt tilstrækkelig for musikformat som er begrænset til 2 V/μs ved frekvensen 20 kHz
SR == 2*π*f*V_O == 2*V/μs
SR := I_E/C_C = 33.5833 V/μs  # .
